# Mohammadreza | Mir | Z1851556 | ELE335 | HW4
Problem1
N_A := 3*10^17 cm^-3
p_p0 := N_A
T := 300 K
n_i := 9.65*10^9 cm^-3
N_t := 10^15 cm^-3
σ := 10^-15 cm^2
q := 1.6023*10^-19 C
N_D := 10^17 cm^-3
n_n0 := N_D
ε_0 := 8.8541*10^-14 F/cm
ε_r := 11.9
ε_s := ε_r*ε_0
ε_s = 1.05364e-12 F/cm
Problem1a
n_n0 := 10^17 cm^-3
p_n0 := n_i^2/n_n0
p_n0 = 931.225 cm^-3
Problem1b
p_p0 := 3*10^17 cm^-3
n_p0 := n_i^2/p_p0
n_p0 = 310.408 cm^-3
Problem1c
V_bi := k*T/q*ln(N_A*N_D/n_i^2)
V_bi = 0.863548 V
Problem1d
W := sqrt(2*ε_s*V_bi*(N_A + N_D)/(q*N_A*N_D))
W = 0.123056 μm
Problem1e
x_n0 := W*N_A/(N_A + N_D)
x_n0 = 0.0922917 μm
x_p0 := W*N_D/(N_A + N_D)
x_p0 = 0.0307639 μm
Problem1f
E_m := [q*N_D*x_n0/ε_s]
E_m = [140351] V/cm
Problem1g
C_j := sqrt(q*ε_s*N_A*N_D/(2*V_bi*(N_A + N_D)))
C_j = 8.56229e-8 F/cm^2
# Problem2 | PartA
V_F := 0.7 V
A := 25 μm^2
n_n0 = 1e17 cm^-3
p_p0 = 3e17 cm^-3
Problem2a.a
p_n0 := n_i^2/n_n0
p_n0 = 931.225 cm^-3
Problem2a.b
n_p0 := n_i^2/p_p0
n_p0 = 310.408 cm^-3
Problem2a.c
V_bi := k*T/q*ln(N_A*N_D/n_i^2)
V_bi = 0.863548 V
Problem2a.d
W := sqrt(2*ε_s*(N_A + N_D)*(V_bi - V_F)/(q*N_A*N_D))
W = 0.0535526 μm
Problem2a.e
x_n0 := W*N_A/(N_A + N_D)
x_n0 = 0.0401644 μm
x_p0 := W*N_D/(N_A + N_D)
x_p0 = 0.0133881 μm
Problem2a.f
E_m := [q*N_D*x_n0/ε_s]
E_m = [61079.3] V/cm
Problem2a.g
C_j := sqrt(q*ε_s*N_A*N_D/(2*(V_bi - V_F)*(N_A + N_D)))
C_j = 1.96748e-7 F/cm^2
C_j := A*sqrt(q*ε_s*N_A*N_D/(2*(V_bi - V_F)*(N_A + N_D)))
C_j = 4.91871e-14 F
Problem2PartB
V_R := -10 V
n_n0 = 1e17 cm^-3
p_p0 = 3e17 cm^-3
Problem2b.a
p_n0 := n_i^2/n_n0
p_n0 = 931.225 cm^-3
Problem2b.b
n_p0 := n_i^2/p_p0
n_p0 = 310.408 cm^-3
Problem2b.c
V_bi := k*T/q*ln(N_A*N_D/n_i^2)
V_bi = 0.863548 V
Problem2a.d
W := sqrt(2*ε_s*(N_A + N_D)*(V_bi - V_R)/(q*N_A*N_D))
W = 0.43646 μm
Problem2b.e
x_n0 := W*N_A/(N_A + N_D)
x_n0 = 0.327345 μm
x_p0 := W*N_D/(N_A + N_D)
x_p0 = 0.109115 μm
Problem2a.f
E_m := [q*N_D*x_n0/ε_s]
E_m = [497803] V/cm
Problem2a.g
C_j := sqrt(q*ε_s*N_A*N_D/(2*(V_bi - V_R)*(N_A + N_D)))
C_j = 2.41406e-8 F/cm^2
C_j := A*sqrt(q*ε_s*N_A*N_D/(2*(V_bi - V_R)*(N_A + N_D)))
C_j = 6.03514e-15 F
Problem2PartC
D_n := 20*cm^2/s
D_p := 4*cm^2/s
m_0 := 9.11*10^-31 kg
m_n := 0.26*m_0
m_n = 2.3686e-31 kg
m_p := 0.69*m_0
m_p = 6.2859e-31 kg
v_thn := sqrt(3*k*T/m_n)
v_thn = 22904312 cm/s
v_thp := sqrt(3*k*T/m_p)
v_thp = 14059808 cm/s
τ_n := (v_thn*σ*N_t)^-1
τ_n = 4.36599e-8 s
τ_p := (v_thp*σ*N_t)^-1
τ_p = 7.11247e-8 s
L_n := sqrt(τ_n*D_n)
L_n = 9.34451e-6 m
L_p := sqrt(τ_p*D_p)
L_p = 5.33384e-6 m
J_sn := q*D_n*n_p0/L_n
J_sn = 1.06451e-12 A/cm^2
J_sp := q*D_p*p_n0/L_p
J_sp = 1.11897e-12 A/cm^2
J_s := (q*D_n*n_p0/L_n + q*D_p*p_n0/L_p)*A
J_s = 5.4587e-19 A
Peoblem2PartD
V_F := .78*V
J_n := q*D_n*n_p0/L_n*(e^(q*V_F/(k*T) - 1))
J_n = 4.98053 A/cm^2
I_n := q*D_n*n_p0/L_n*(e^(q*V_F/(k*T) - 1))*A
I_n = 1.24513e-6 A
J_p := q*D_p*p_n0/L_p*(e^(q*V_F/(k*T) - 1))
J_p = 5.23531 A/cm^2
I_p := q*D_p*p_n0/L_p*(e^(q*V_F/(k*T) - 1))*A
I_p = 1.30883e-6 A
J := (q*p_n0*D_p/L_p + q*D_n*n_p0/L_n)*(e^(q*V_F/(k*T) - 1))
J = 10.2158 A/cm^2
I := A*(q*p_n0*D_p/L_p + q*D_n*n_p0/L_n)*(e^(q*V_F/(k*T) - 1))
I = 2.55396e-6 A
Problem2PartE
C_dp := q^2*L_p*p_n0/(k*T)*(e^(q*V_F/(k*T)))
C_dp = 3.91558e-5 F/cm^2
C_dp := A*q^2*L_p*p_n0/(k*T)*(e^(q*V_F/(k*T)))
C_dp = 9.78896e-12 F
C_dn := q^2*L_n*n_p0/(k*T)*(e^(q*V_F/(k*T)))
C_dn = 2.28661e-5 F/cm^2
C_dn := A*q^2*L_n*n_p0/(k*T)*(e^(q*V_F/(k*T)))
C_dn = 5.71652e-12 F
C_d := ((q^2*L_p*p_n0/(k*T)*(e^(q*V_F/(k*T)))) + (q^2*L_n*n_p0/(k*T)*(e^(q*V_F/(k*T)))))
C_d = 6.20219e-5 F/cm^2
C_d := ((A*q^2*L_p*p_n0/(k*T)*(e^(q*V_F/(k*T)))) + (A*q^2*L_n*n_p0/(k*T)*(e^(q*V_F/(k*T)))))
C_d = 1.55055e-11 F
Problem3
N_V := 7*10^18 cm^-3
N_A := N_V
p_p0 := N_A
N_D := 2*10^17 cm^-3
N_B := N_D
n_n0 := N_D
A := 100*μm^2
T := 300 K
q := 1.6023*10^-19 C
n_i := 2.25*10^6 cm^-3
τ_p := 10*ns
τ_n := τ_p
τ := 10*ns
ε_0 = 8.85419e-14 F/cm
ε_r := 12.4
ε_s := ε_0*ε_r
ε_s = 1.09792e-12 F/cm
Problem3a
n_n0 = 2e17 cm^-3
p_n0 := n_i^2/n_n0
p_n0 = 2.53125e-5 cm^-3
Problem3b
p_p0 = 7e18 cm^-3
n_p0 := n_i^2/p_p0
n_p0 = 7.23214e-7 cm^-3
Problem3c
V_bi := k*T/q*ln(N_A*N_D/n_i^2)
V_bi = 1.3953 V
Problem3d
W := sqrt(2*ε_s*V_bi/(q*N_B))
W = 0.0977793 μm
Problem3e
x_n0 := W*N_A/(N_A + N_D)
x_n0 = 0.0950632 μm
x_p0 := W*N_D/(N_A + N_D)
x_p0 = 0.00271609 μm
Problem3f
E_m := [q*N_D/ε_s*x_n0]
E_m = [277470] V/cm
Problem3g
C_j := sqrt(q*ε_s*N_B/(2*V_bi))
C_j = 1.12285e-7 F/cm^2
C_j := A*sqrt(q*ε_s*N_B/(2*V_bi))
C_j = 1.12285e-13 F
Problem3h
D_n := 100*cm^2/s
D_p := 1*cm^2/s
m_0 := 9.11*10^-31 kg
L_n := sqrt(τ_n*D_n)
L_n = 1e-5 m
L_p := sqrt(τ_p*D_p)
L_p = 1e-6 m
J_sn := q*D_n*n_p0/L_n
J_sn = 1.15881e-20 A/cm^2
J_sp := q*D_p*p_n0/L_p
J_sp = 4.05582e-20 A/cm^2
J_sn := A*q*D_n*n_p0/L_n
J_sn = 1.15881e-26 A
J_sp := A*q*D_p*p_n0/L_p
J_sp = 4.05582e-26 A
J_s := (q*D_n*n_p0/L_n + q*D_p*p_n0/L_p)*A
J_s = 5.21463e-26 A
J_s := (q*D_n*n_p0/L_n + q*D_p*p_n0/L_p)
J_s = 5.21463e-20 A/cm^2
Problem3i
V_F := .8*V
J_n := q*D_n*n_p0/L_n*(e^(q*V_F/(k*T) - 1))
J_n = 1.17529e-7 A/cm^2
I_n := A*q*D_n*n_p0/L_n*(e^(q*V_F/(k*T) - 1))
I_n = 1.17529e-13 A
J_p := q*D_p*p_n0/L_p*(e^(q*V_F/(k*T) - 1))
J_p = 4.11352e-7 A/cm^2
I_p := A*q*D_p*p_n0/L_p*(e^(q*V_F/(k*T) - 1))
I_p = 4.11352e-13 A
J := (q*D_p*p_n0/L_p + q*D_n*n_p0/L_n)*(e^(q*V_F/(k*T) - 1))
J = 5.28882e-7 A/cm^2
I := A*(q*D_p*p_n0/L_p + q*D_n*n_p0/L_n)*(e^(q*V_F/(k*T) - 1))
I = 5.28882e-13 A
Problem3j
# Current for the holes are bigger that current of electrons and we ignore the current for electrons.
Problem3k
V_R := -10*V
J_n := q*D_n*n_p0/L_n*(e^(q*V_R/(k*T) - 1))
J_n = 4.21061e-189 A/cm^2
I_n := A*q*D_n*n_p0/L_n*(e^(q*V_R/(k*T) - 1))
I_n = 4.21061e-195 A
J_p := q*D_p*p_n0/L_p*(e^(q*V_R/(k*T) - 1))
J_p = 1.47371e-188 A/cm^2
I_p := A*q*D_p*p_n0/L_p*(e^(q*V_R/(k*T) - 1))
I_p = 1.47371e-194 A
J := (q*D_p*p_n0/L_p + q*D_n*n_p0/L_n)*(e^(q*V_R/(k*T) - 1))
J = 1.89478e-188 A/cm^2
I := A*(q*D_p*p_n0/L_p + q*D_n*n_p0/L_n)*(e^(q*V_R/(k*T) - 1))
I = 1.89478e-194 A
Problem3l
# Current for the holes is smaller than current for the electrons and we ignore current for holes.
Problem3m
V_F := .8*V
I := A*(q*D_p*p_n0/L_p + q*D_n*n_p0/L_n)*(e^(q*V_F/(k*T) - 1))
I = 5.28882e-13 A
C_d := I*(q*τ/(k*T))
C_d = 2.04596e-19 F
